M := [
    100, 50, 50, 50, 50, 50, 8.8, 8, 8;
    100, 70.88, 57.30, 49.22, 42.42, 32.53, 8.84, 8.8, 8;
    100, 76.21, 59.09, 47.17, 37.95, 28.84, 17.68, 8.84, 8.8;
    100, 74.86, 55.67, 42.42, 33.37, 27.19, 24.20, 28.64, 50;
    100, 67.56, 46.33, 33.46, 25.92, 22.35, 23.30, 31.52, 50;
    100, 49.02, 28.63, 19.15, 14.52, 13.30, 15.11, 24.16, 50;
    100, 0, 0, 0, 0, 0, 0, 0, 50
]
P := [
    0, 0, 255;
    0, 178, 255;
    0, 255, 255;
    0, 255, 178;
    0, 255, 0;
    178, 255, 0;
    255, 255, 0;
    255, 178, 0;
    255, 0, 0
]
M := READPRN("res")
# [component: inputs M]
SaveColormap("My", P) = 9
M = [
    100, 50, 50, 50, 50, 50, 50, 8, 8, 8, 8;
    100, 73.19, 61.45, 54.73, 49.5, 43.58, 33.43, 8.95, 8, 8, 8;
    100, 81.33, 67.87, 57.96, 49.7, 41.38, 31.18, 17.9, 8.95, 8, 8;
    100, 84.25, 70.74, 59.55, 49.97, 41.07, 32, 22.52, 13.97, 4.88, 8;
    100, 84.94, 71.28, 59.53, 49.55, 40.92, 33.23, 26.23, 19.52, 9.76, 50;
    100, 84.24, 69.91, 57.73, 47.78, 39.84, 33.76, 29.64, 28.13, 31.46, 50;
    100, 82.09, 66.4, 53.72, 43.99, 36.92, 32.33, 30.43, 31.89, 37.95, 50;
    100, 77.74, 59.86, 46.75, 37.55, 31.49, 28.23, 27.88, 31.03, 38.47, 50;
    100, 68.99, 48.58, 35.86, 27.96, 23.29, 21.21, 21.82, 25.89, 34.89, 50;
    100, 49.65, 29.59, 20.15, 15.15, 12.48, 11.49, 12.29, 15.84, 25.18, 50;
    100, 0, 0, 0, 0, 0, 0, 0, 0, 0, 50
]
